// SBML level 2 version 4

model barton_wang()
  // barton-wang

  // Compartments:
  compartment compartment = 1;

  // Species:
  species notch in compartment = 1;
  species delta in compartment = 1;
  species nicd in compartment = 1;
  species hesM in compartment = 1;
  species hesC in compartment = 1;
  species hesN in compartment = 1;
  species ngn in compartment = 1;
  species $neighbor_delta in compartment = 1;
  species $neighbor_notch in compartment = 1;

  // Parameters:
  v1 = 1;
  v2 = 0.2;
  v3 = 0.575;
  v4 = 0.851;
  v5 = 0.021;
  v6 = 0.162;
  v7 = 10;
  v8 = 20;
  v9 = 8.5;
  v10 = 10;
  v11 = 0.88;
  vNgn = 0.01;
  K1 = 0.157;
  K2 = 0.104;
  K4 = 0.142;
  K6 = 0.13;
  K7 = 2;
  K8 = 4.722;
  K9 = 0.06;
  K10 = 10;
  K11 = 0.03;
  K12 = 2;
  Kd = 2;
  kt = 10;
  kc = 2;
  vc = 0.5;
  bNotch = 10;
  bDelta = 1;
  bNgn = 2.5;
  bDec = 2.8;
  h = 2;
  n = 2;

  // Rate rules:
  notch' = bNotch - v9*notch/(K9 + notch) - notch*neighbor_delta/kt - delta*notch/kc;
  delta' = bDelta - v8*delta/(K8 + delta) - delta*neighbor_notch/kt - delta*notch/kc + v7*K7^h/(K7^h + hesN^h) + vNgn*ngn/(K12 + ngn);
  nicd' = notch*neighbor_delta/kt - v10*nicd/(K10 + nicd);
  hesM' = (v1 + vc*nicd/(Kd + nicd))*K1^n/(K1^n + hesN^n) - v2*hesM/(K2 + hesM);
  hesC' = v3*hesM - v4*hesC/(K4 + hesC) - v5*hesC;
  hesN' = -v6*hesN/(K6 + hesN) + v5*hesC;
  ngn' = bNgn - v11*ngn/(K11 + ngn) - bDec*hesN*ngn/(K12 + ngn);

  // Unit definitions:
  unit length = metre;
  unit area = metre^2;
  unit volume = litre;
  unit time = 0.06 second;
  unit substance = 1e-9 mole;
end
